*NODE, NSET=Nall
1, 0.000000, 0.000000, 0.000000
2, 0.040000, 0.000000, 0.000000
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*ELEMENT, TYPE=S4, ELSET=Eall
1, 1, 2, 28, 27
2, 2, 3, 29, 28
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*MATERIAL, NAME=Glass
*ELASTIC
70000000000.0, 0.23
*SHELL SECTION, ELSET=Eall, MATERIAL=Glass, Offset=0
0.0254
*NSET, NSET=BCXY
1
*NSET, NSET=BCY
651
*NSET, NSET=EDGENODES
1, 2, 3, 4, 5, 6
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*STEP,NLGEOM=YES,INC=100,AMPLITUDE=STEP
*STATIC
0.01,1,0,0
*Output, Frequency=1
*BOUNDARY
BCXY, 1,,0
BCXY, 2,,0
BCY, 2,,0
EDGENODES, 3,,0
*DSLOAD
Eall, P, -2000.0
*NODE FILE
U
*EL FILE
S
*NODE PRINT, NSET=Nall, FREQUENCY=9999
U
*EL PRINT, ELSET=Eall, FREQUENCY=9999
S
*END STEP
